// COMSOL Multiphysics 5.3.0.223 model "SimpleTraces.mph"
// Outline of the model tree

Functions
  an1: Analytic "P_top" | funcname = Pt; expr = 50+50*sin(pi*x); argunit = m; fununit = Pa

Geometry
  geom1 "Geometry 1" (2D, length unit m)
    r1: Rectangle | size = {1, 0.75}
    b1: BezierPolygon "Bézier Polygon 1" | p = {{0.25, 0.5}, {0, 0.5}}; degree = 1; w = {1, 1}
    b2: BezierPolygon "Bézier Polygon 2" | p = {{0.55, 0.1}, {0, 0.5}}; degree = 1; w = {1, 1}
    fin: Finalize "Form Union"

Physics
  dl: DarcysLaw on all domains
    dependent variable p
    dlm1: DarcysLawModel "Fluid and Matrix Properties 1" (default)
      rho_mat = userdef
      rho = 1000
      mu_mat = userdef
      mu = 1
      epsilon_mat = userdef
      epsilon = 1
      kappa_mat = userdef
      kappa = diag{2, 5, 0}
    nf1: NoFlow (default)
    init1: init "Initial Values 1" (default)
    pr1: Pressure1 on boundaries 1, 10 | p0 = 100
    pr2: Pressure1 on boundaries 4, 5, 7, 8 | p0 = 50

Mesh
  mesh1 "Mesh 1" (physics-controlled)
    size: MeshSizeDefault | hauto = 2

Studies
  std1 "Study 1"
    stat: Stationary

Solver configurations
  sol1 "Solution 1" (study std1)
    v1: Variables "Dependent Variables 1"
    s1: Stationary "Stationary Solver 1"
      dDef: Direct
      fc1: FullyCoupled | linsolver = dDef

Datasets
  dset1: Solution | solution = sol1
  cln1: CutLine2D | data = dset1; genpoints = {{0.0, 0.35}, {1.0, 0.35}}
  edg1: Edge2D on boundaries 1-3, 6, 9, 10 | data = dset1

Derived values
  pev1: EvalPoint "Point Evaluation 1" | data = dset1; table = tbl2; expr = {p, dl.u, dl.v}

Tables
  tbl2: Table
    // Point Evaluation 1 (p, dl.u, dl.v)
    Pressure (Pa), Point: 3 | Darcy's velocity field, X component (m/s), Point: 3 | Darcy's velocity field, Y component (m/s), Point: 3
    91.9698 | 95.7826 | -0.417362

Plots
  pg1: PlotGroup2D "Pressure (dl)" | data = dset1
    surf1: Surface | expr = p
    str1: Streamline (disabled) | expr = {dl.u, dl.v}
    arwl1: ArrowLine | expr = {dl.u, dl.v}; arrowlength = normalized
  pg3: PlotGroup2D "Velocity" | data = dset1
    surf1: Surface | expr = sqrt(dl.u^2+dl.v^2)
  pg2: PlotGroup1D "Cut Line_PUV" | data = dset1
    lngr1: LineGraph "p" | data = cln1; expr = p; legends = p
    lngr2: LineGraph "u" | data = cln1; expr = dl.u; descr = Darcy's velocity field, X component; legends = u
    lngr3: LineGraph "v" | data = cln1; expr = dl.v; legends = v
  pg4: PlotGroup1D "Edge_PUV" | data = dset1
    lngr1: LineGraph "p" | data = edg1; expr = p; xdata = reversedarc; legends = p
    lngr2: LineGraph "u" | data = edg1; expr = dl.u; xdata = reversedarc; legends = u
    lngr3: LineGraph "v" | data = edg1; expr = dl.v; xdata = reversedarc; legends = v

Exports
  plot1: Plot | filename = F:\1. PyBEM2D\Acclerated\PyBEM2D\Examples\Verification\SimpleTraces_v.csv
  plot2: Plot | filename = F:\1. PyBEM2D\Acclerated\PyBEM2D\Examples\Verification\SimpleTraces_BD_v.csv