// COMSOL Multiphysics 5.3.0.223 model "SquareDomain2.mph"
// Outline of the model tree

Functions
  an1: Analytic "Q_top" | funcname = Qt; expr = 60*cos(4*pi*x); argunit = m; fununit = kg/(m^2*s)

Geometry
  geom1 "Geometry 1" (2D, length unit m)
    sq1: Square
    pt1: Point | p = {0.5, 0.5}
    fin: Finalize "Form Union"

Physics
  dl: DarcysLaw on all domains
    dependent variable p
    dlm1: DarcysLawModel "Fluid and Matrix Properties 1" (default)
      rho_mat = userdef
      rho = 1000
      mu_mat = userdef
      mu = 1
      epsilon_mat = userdef
      epsilon = 1
      kappa_mat = userdef
      kappa = {1, 2, 0, 2, 5, 0, 0, 0, 0}
    nf1: NoFlow (default)
    init1: init "Initial Values 1" (default)
    pr2: Pressure1 on boundaries 2 | p0 = 0
    mf1: MassFlux1 on boundaries 3 | N0 = Qt(x)*1000

Mesh
  mesh1 "Mesh 1" (physics-controlled)
    size: MeshSizeDefault | hauto = 2

Studies
  std1 "Study 1"
    stat: Stationary

Solver configurations
  sol1 "Solution 1" (study std1)
    v1: Variables "Dependent Variables 1"
    s1: Stationary "Stationary Solver 1"
      dDef: Direct
      fc1: FullyCoupled | linsolver = dDef

Datasets
  dset1: Solution | solution = sol1
  cln1: CutLine2D | data = dset1; genpoints = {{0.0, 0.98}, {1.0, 0.98}}
  edg1: Edge2D on boundaries 1-4 | data = dset1

Derived values
  pev1: EvalPoint "Point Evaluation 1" on points 3 | data = dset1; table = tbl2; expr = {p, dl.u, dl.v}

Tables
  tbl2: Table
    // Point Evaluation 1 (p, dl.u, dl.v)
    Pressure (Pa), Point: 3 | Darcy's velocity field, X component (m/s), Point: 3 | Darcy's velocity field, Y component (m/s), Point: 3
    79.3893 | -127.122 | -92.6766

Plots
  pg1: PlotGroup2D "Pressure (dl)" | data = dset1
    surf1: Surface | expr = p
    str1: Streamline (disabled) on boundaries 1 | expr = {dl.u, dl.v}
  pg3: PlotGroup2D "Velocity" | data = dset1
    surf1: Surface | expr = sqrt(dl.u^2+dl.v^2)
  pg2: PlotGroup1D "Cut Line_PUV" | data = dset1
    lngr1: LineGraph "p" | data = cln1; expr = p; legends = p
    lngr2: LineGraph "u" | data = cln1; expr = dl.u; descr = Darcy's velocity field, X component; legends = u
    lngr3: LineGraph "v" | data = cln1; expr = dl.v; legends = v
  pg4: PlotGroup1D "Edge_PUV" | data = dset1
    lngr1: LineGraph "p" | data = edg1; expr = p; xdata = reversedarc; legends = p
    lngr2: LineGraph "u" | data = edg1; expr = dl.u; xdata = reversedarc; legends = u
    lngr3: LineGraph "v" | data = edg1; expr = dl.v; xdata = reversedarc; legends = v

Exports
  plot1: Plot | filename = F:\1. PyBEM2D\Acclerated\PyBEM2D\Examples\Verification\SquareDomain2_p.csv
  plot2: Plot | filename = F:\1. PyBEM2D\Acclerated\PyBEM2D\Examples\Verification\SquareDomain2_BD_p.csv