// COMSOL Multiphysics 5.3.0.223 model "UnitSquare_Source.mph"
// Outline of the model tree

Functions
  an1: Analytic "Q_top" | funcname = Qt; expr = 60*cos(4*pi*x); argunit = m; fununit = m/s

Geometry
  geom1 "Geometry 1" (2D, length unit m)
    sq1: Square
    b1: BezierPolygon "Bézier Polygon 1" | p = {{0.25, 0.25}, {0.25, 0.75}}; degree = 1; w = {1, 1}
    c1: Circle "Circle for mesh refinement" | pos = {0.75, 0.25}; r = 1e-3
    dif1: Difference (disabled) | input = sq1; input2 = c1
    pt2: Point | p = {0.75, 0.25}
    b4: BezierPolygon "Line for mesh refinement" | p = {{0.248, 0.248}, {0.76, 0.24}}; degree = 1; w = {1, 1}; type = open
    b5: BezierPolygon "Line for mesh refinement2"
      p = {{0.252, 0.252}, {0.76, 0.24}}
      degree = 1
      w = {1, 1}
      type = open
    fin: Finalize "Form Union"

Physics
  dl: DarcysLaw on all domains
    dependent variable p
    ShapeProperty.order_pressure = 1
    dlm1: DarcysLawModel "Fluid and Matrix Properties 1" (default)
      rho_mat = userdef
      rho = 1000
      mu_mat = userdef
      mu = 2
      epsilon_mat = userdef
      epsilon = 1
      kappa_mat = userdef
      kappa = 3
    nf1: NoFlow (default)
    init1: init "Initial Values 1" (default)
    pr2: Pressure1 on boundaries 2 | p0 = 0
    mf1: MassFlux1 on boundaries 3 | N0 = Qt(x)*1000[kg/m^3]
    pr3: Pressure1 on boundaries 5 | p0 = -5
    pr4: Pressure1 (disabled) on no boundaries | p0 = 3
    well1: Well on points 11 | dw = 2e-3; p0 = 3

Mesh
  mesh1 "Mesh 1" (physics-controlled)
    size: MeshSizeDefault | hauto = 3

Studies
  std1 "Study 1"
    stat: Stationary

Solver configurations
  sol1 "Solution 1" (study std1)
    v1: Variables "Dependent Variables 1"
    s1: Stationary "Stationary Solver 1"
      dDef: Direct
      fc1: FullyCoupled | linsolver = dDef

Datasets
  dset1: Solution | solution = sol1
  cln1: CutLine2D | data = dset1; genpoints = {{0.0, 0.24}, {1.0, 0.24}}
  edg1: Edge2D on boundaries 1-3, 7 | data = dset1
  cpt1: CutPoint2D "L2_Err_Pts" | data = dset1; method = regulargrid; regulargridx = 40; regulargridy = 40
  cpt2: CutPoint2D "Center" | data = dset1; pointx = 0.5; pointy = 0.5

Derived values
  pev1: EvalPoint "Point Evaluation 1"
    data = cpt2
    table = tbl1
    expr = {p, dl.u, dl.v}
    unit = {Pa, m/s, m/s}
    descr = {Pressure, "Darcy's velocity field, X component", "Darcy's velocity field, Y component"}
  av1: AvSurface "Avg_h" on domains 1 | data = dset1; table = new; expr = h; unit = m; descr = Element size

Tables
  tbl1: Table
    // Point Evaluation 1 (p, dl.u, dl.v)
    Pressure (Pa), Point: (0.5, 0.5) | Darcy's velocity field, X component (m/s), Point: (0.5, 0.5) | Darcy's velocity field, Y component (m/s), Point: (0.5, 0.5)
    0.986143 | -3.11052 | -2.31894

Plots
  pg1: PlotGroup2D "Pressure (dl)" | data = dset1
    surf1: Surface | expr = p
    str1: Streamline (disabled) on boundaries 1 | expr = {dl.u, dl.v}
    mesh1: Mesh (disabled)
  pg3: PlotGroup2D "Velocity" | data = dset1
    surf1: Surface | expr = sqrt(dl.u^2+dl.v^2)
  pg5: PlotGroup2D "VelocityVector" | data = dset1
    arws1: ArrowSurface | expr = {dl.u, dl.v}; arrowlength = normalized
  pg2: PlotGroup1D "Cut Line_PUV" | data = dset1
    lngr1: LineGraph "p" | data = cln1; expr = p; legends = p
    lngr2: LineGraph "u" | data = cln1; expr = dl.u; descr = Darcy's velocity field, X component; legends = u
    lngr3: LineGraph "v" | data = cln1; expr = dl.v; legends = v
    lngr4: LineGraph "U" | data = cln1; expr = sqrt(dl.u^2+dl.v^2)
  pg4: PlotGroup1D "Edge_PUV" | data = dset1
    lngr1: LineGraph "p" | data = edg1; expr = p; xdata = reversedarc; legends = p
    lngr2: LineGraph "u" | data = edg1; expr = dl.u; xdata = reversedarc; legends = u
    lngr3: LineGraph "v" | data = edg1; expr = dl.v; xdata = reversedarc; legends = v
  pg6: PlotGroup2D "h" | data = dset1

Exports
  plot1: Plot | filename = F:\1. PyBEM2D\Acclerated\PyBEM2D\Examples\Verification\UnitSquareTS_p.csv
  plot2: Plot | exporttype = vtu; filename = F:\1. PyBEM2D\Acclerated\PyBEM2D\Examples\Verification\UnitSquare_LGR.vtu
  plot3: Plot | filename = F:\1. PyBEM2D\Acclerated\PyBEM2D\Examples\Verification\UnitSquareTS_u.csv
  plot4: Plot | filename = F:\1. PyBEM2D\Acclerated\PyBEM2D\Examples\Verification\UnitSquareTS_v.csv